// SBML level 3 version 1

model main()
  // Simple Model one compartment, with two species, and a reaction. It also contains one Layout for the model along with a global Render information object that describes how the layout glyphs should be rendered.
  // model units - substance: substance, time: second, volume: volume, area: area, length: metre, extent: substance

  // Compartments:
  compartment compartment = 1 volume;
  compartment vol1 = 1 volume;

  // Species:
  species Node0 in vol1 = 0;
  species Node1 in vol1 = 0;

  // Parameters:
  J0_k = 0.1;

  // Reactions:
  J0: Node0 => Node1; J0_k*Node0;

  // Unit definitions:
  unit volume = litre;
  unit substance = mole;
  unit area = metre^2;
end
