// SBML level 3 version 1

function Function_for__J3(C, default_compartment, k4)
  k4*C/default_compartment;
end

function Function_for__J4(B, D, default_compartment, k5)
  (k5*D + B)/default_compartment;
end

function Function_for__J2(C, default_compartment, k3)
  k3*C/default_compartment;
end

function Function_for__J0(ABCDEFG, default_compartment, k1)
  k1*ABCDEFG/default_compartment;
end

function Function_for__J1(B, default_compartment, k1)
  k1*B/default_compartment;
end

model __main()
  // model units - substance: substance, time: time, volume: volume, area: area, length: length, extent: substance

  // Compartments:
  compartment default_compartment = 1 volume;

  // Species:
  species ABCDEFG in default_compartment = 1;
  species B in default_compartment = 1;
  species C in default_compartment = 1;
  species D in default_compartment = 1;
  species E in default_compartment = 1;
  species F in default_compartment = 1;

  // Parameters:
  k1 = 1;
  k3 = 1;
  k4 = 1;
  k5 = 2;
  k2 = 1;

  // Reactions:
  _J0: ABCDEFG -> B; default_compartment*Function_for__J0(ABCDEFG, default_compartment, k1);
  _J1: B -> C + D; default_compartment*Function_for__J1(B, default_compartment, k1);
  _J2: C -> ABCDEFG; default_compartment*Function_for__J2(C, default_compartment, k3);
  _J3: C -> D + E; default_compartment*Function_for__J3(C, default_compartment, k4);
  _J4: D + B -> F; default_compartment*Function_for__J4(B, D, default_compartment, k5);

  // Unit definitions:
  unit length = metre;
  unit area = metre^2;
  unit volume = litre;
  unit time = second;
  unit substance = mole;
end
