// SBML level 3 version 1

model BorisEJB()
  // model units - substance: substance, time: second, volume: volume, area: area, length: metre, extent: substance

  // Compartments:
  compartment compartment = 1 volume;

  // Species:
  species MKKK in compartment = 90;
  species MKKK_P in compartment = 10;
  species MKK in compartment = 280;
  species MKK_P in compartment = 10;
  species MKK_PP in compartment = 10;
  species MAPK in compartment = 280;
  species MAPK_P in compartment = 10;
  species MAPK_PP in compartment = 10;

  // Parameters:
  J0_V1 = 2.5;
  J0_Ki = 9;
  J0_n = 1;
  J0_K1 = 10;
  J1_V2 = 0.25;
  J1_KK2 = 8;
  J2_k3 = 0.025;
  J2_KK3 = 15;
  J3_k4 = 0.025;
  J3_KK4 = 15;
  J4_V5 = 0.75;
  J4_KK5 = 15;
  J5_V6 = 0.75;
  J5_KK6 = 15;
  J6_k7 = 0.025;
  J6_KK7 = 15;
  J7_k8 = 0.025;
  J7_KK8 = 15;
  J8_V9 = 0.5;
  J8_KK9 = 15;
  J9_V10 = 0.5;
  J9_KK10 = 15;

  // Reactions:
  J0: MKKK => MKKK_P; J0_V1*MKKK/((1 + (MAPK_PP/J0_Ki)^J0_n)*(J0_K1 + MKKK));  // modifiers: MAPK_PP
  J1: MKKK_P => MKKK; J1_V2*MKKK_P/(J1_KK2 + MKKK_P);
  J2: MKK => MKK_P; J2_k3*MKKK_P*MKK/(J2_KK3 + MKK);  // modifiers: MKKK_P
  J3: MKK_P => MKK_PP; J3_k4*MKKK_P*MKK_P/(J3_KK4 + MKK_P);  // modifiers: MKKK_P
  J4: MKK_PP => MKK_P; J4_V5*MKK_PP/(J4_KK5 + MKK_PP);
  J5: MKK_P => MKK; J5_V6*MKK_P/(J5_KK6 + MKK_P);
  J6: MAPK => MAPK_P; J6_k7*MKK_PP*MAPK/(J6_KK7 + MAPK);  // modifiers: MKK_PP
  J7: MAPK_P => MAPK_PP; J7_k8*MKK_PP*MAPK_P/(J7_KK8 + MAPK_P);  // modifiers: MKK_PP
  J8: MAPK_PP => MAPK_P; J8_V9*MAPK_PP/(J8_KK9 + MAPK_PP);
  J9: MAPK_P => MAPK; J9_V10*MAPK_P/(J9_KK10 + MAPK_P);

  // Unit definitions:
  unit volume = litre;
  unit substance = mole;
  unit area = metre^2;
end
