// SBML level 3 version 1

function Function_for__J0(S1, default_compartment, k1)
  k1*S1/default_compartment;
end

model __main()
  // model units - substance: substance, time: time, volume: volume, area: area, length: length, extent: substance

  // Compartments:
  compartment default_compartment = 1 volume;

  // Species:
  species S1 in default_compartment = 10;
  species S2 in default_compartment = 1;

  // Parameters:
  k1 = 0.1;

  // Reactions:
  _J0: S1 -> S2; default_compartment*Function_for__J0(S1, default_compartment, k1);

  // Unit definitions:
  unit length = metre;
  unit area = metre^2;
  unit volume = litre;
  unit time = second;
  unit substance = mole;
end
