// SBML level 3 version 1

model Proctor2005_Hsp90()
  // model units - substance: substance, time: second, volume: volume, area: area, length: metre, extent: substance

  // Compartments:
  compartment graphfab_default_compartment = 1 volume;

  // Species:
  species Hsp90 in graphfab_default_compartment = 0;
  species HCom in graphfab_default_compartment = 0;
  species HSF1 in graphfab_default_compartment = 0;
  species MisP in graphfab_default_compartment = 0;
  species MCom in graphfab_default_compartment = 0;
  species TriH in graphfab_default_compartment = 0;
  species DiH in graphfab_default_compartment = 0;
  species NatP in graphfab_default_compartment = 0;
  species AggP in graphfab_default_compartment = 0;
  species HSE in graphfab_default_compartment = 0;
  species HSETriH in graphfab_default_compartment = 0;
  species X in graphfab_default_compartment = 0;
  species ROS in graphfab_default_compartment = 0;
  species ATP in graphfab_default_compartment = 0;
  species ADP in graphfab_default_compartment = 0;
  species source in graphfab_default_compartment = 0;

  // Reactions:
  proteinSynthesis: source => NatP; 1;
  misfolding: NatP + ROS => MisP + ROS; 1;
  Hsp90MisPBinding: MisP + Hsp90 => MCom; 1;
  unsuccessulRefolding: MCom => MisP + Hsp90; 1;
  refolding: MCom + ATP => Hsp90 + NatP + ADP; 1;
  proteinDegradation: MisP + ATP => ADP; 1;
  proteinAggregation1: MisP => AggP; 1;
  proteinAggregation2: MisP + AggP => AggP; 1;
  Hsp90HSF1Binding: Hsp90 + HSF1 => HCom; 1;
  Hsp90HSF1Release: HCom => Hsp90 + HSF1; 1;
  dimerisation: HSF1 => DiH; 1;
  trimerisation: HSF1 + DiH => TriH; 1;
  deTrimerisation: TriH => HSF1 + DiH; 1;
  deDimerisation: DiH => HSF1; 1;
  HSETriHBinding: TriH + HSE => HSETriH; 1;
  HSETriHRelease: HSETriH => HSE + TriH; 1;
  Hsp90Transcription: HSETriH => HSETriH + Hsp90; 1;
  Hsp90Degradation: Hsp90 + ATP => ADP; 1;
  countTime: source => X; 1;
  ATPformation: ADP => ATP; 1;
  ATPconsumption: ATP => ADP; 1;
  radicalFormation: source => ROS; 1;
  radicalScavenging: ROS => ; 1;

  // Unit definitions:
  unit volume = litre;
  unit substance = mole;
  unit area = metre^2;
end
